<?xml version="1.0"?>
<?xml-stylesheet type="text/xsl" href="http://jsbsim.sourceforge.net/JSBSim.xsl"?>
<fdm_config name="MD-12" version="2.0" release="ALPHA"
   xmlns:xsi="http://www.w3.org/2001/XMLSchema-instance"
   xsi:noNamespaceSchemaLocation="http://jsbsim.sourceforge.net/JSBSim.xsd">

 <fileheader>
  <author> Aeromatic v 0.91 </author>
  <filecreationdate> 2010-02-03 </filecreationdate>
  <version>$Revision: 1.10 $</version>
  <description> Models a McDonnell-Douglas MD-12. </description>
 </fileheader>

<!--
  File:     MD-12.xml
  Inputs:
    name:          MD-12
    type:          four-engine transonic transport
    max weight:    949252.5 lb
    wing span:     213.0103944 ft
    length:        208.0101504 ft
    wing area:     5846.4715 sq-ft
    gear type:     tricycle
    retractable?:  yes
    # engines:     4
    engine type:   turbine
    engine layout: wings
    yaw damper?    yes
  Outputs:
    wing loading:  162.36 lb/sq-ft
    CL-alpha:      4.4 per radian
    CL-0:          0.2
    CL-max:        1.2
    CD-0:          0.017
    K:             0.042

    REFERENCE : http://en.wikipedia.org/wiki/McDonnell_Douglas_MD-12
    http://www.calculateme.com/Length/Feet/ToMeters.htm

-->

 <metrics>
   <wingarea  unit="M2"> 543.1 </wingarea>
   <wingspan  unit="M" >  64.92 </wingspan>
   <wing_incidence>          2.00 </wing_incidence>
   <chord     unit="M" >   8.88 </chord>
   <htailarea unit="M2"> 181.952988 </htailarea>
   <htailarm  unit="M" >   16.40 </htailarm>
   <vtailarea unit="M2"> 96.080884 </vtailarea>
   <vtailarm  unit="M" >   22.03 </vtailarm>
   <location name="AERORP" unit="M">
     <x>   0.00 </x>
     <y>   0.00 </y>
     <z>   10.5361 </z>
   </location>
   <location name="EYEPOINT" unit="M">
     <x> -29.2332 </x>
     <y> -0.7169 </y>
     <z>  7.87187 </z>
   </location>
   <location name="VRP" unit="M">
     <x>0</x>
     <y>0</y>
     <z>0</z>
   </location>
 </metrics>

 <mass_balance>
   <ixx unit="SLUG*FT2">  20545593 </ixx>
   <iyy unit="SLUG*FT2">  22117907 </iyy>
   <izz unit="SLUG*FT2">  43287194 </izz>
   <emptywt unit="LBS" >    429200 </emptywt>
   <location name="CG" unit="M">
     <x> 0.60 </x>
     <y> 0.00 </y>
     <z> 5.25637 </z>
   </location>

<!-- ############# -->
<!-- Belly Pallets -->
<!-- ############# -->
<pointmass name="Crew">
	<weight unit="LBS"> 528.00 </weight>
	<location name="POINTMASS" unit="M">
		<x> -27.1682 </x>
		<y> 0.000 </y>
		<z> 6.73476 </z>
	</location>
</pointmass>

<pointmass name="Belly Pallet 11">
	<weight unit="LBS"> 0.0000 </weight>
	<location name="POINTMASS" unit="M">
		<x> -24.2862 </x>
		<y> 0.000 </y>
		<z> 4.83385 </z>
	</location>
</pointmass>

<pointmass name="Belly Pallet 12">
	<weight unit="LBS"> 0.0000 </weight>
	<location name="POINTMASS" unit="M">
		<x> -21.5927 </x>
		<y> 0.000 </y>
		<z> 4.83385 </z>
	</location>
</pointmass>

<pointmass name="Belly Pallet 13">
	<weight unit="LBS"> 0.0000 </weight>
	<location name="POINTMASS" unit="M">
		<x> -18.9405 </x>
		<y> 0.000 </y>
		<z> 4.83385 </z>
	</location>
</pointmass>

<pointmass name="Belly Pallet 14">
	<weight unit="LBS"> 0.0000 </weight>
	<location name="POINTMASS" unit="M">
		<x> -16.2982 </x>
		<y> 0.000 </y>
		<z> 4.83385 </z>
	</location>
</pointmass>

<pointmass name="Belly Pallet 15">
	<weight unit="LBS"> 0.0000 </weight>
	<location name="POINTMASS" unit="M">
		<x> -15.8494 </x>
		<y> 0.000 </y>
		<z> 4.83385 </z>
	</location>
</pointmass>

<pointmass name="Belly Pallet 16">
	<weight unit="LBS"> 0.0000 </weight>
	<location name="POINTMASS" unit="M">
		<x> -10.9525 </x>
		<y> 0.000 </y>
		<z> 4.83385 </z>
	</location>
</pointmass>


<pointmass name="Belly Pallet 21">
	<weight unit="LBS"> 0.0000 </weight>
	<location name="POINTMASS" unit="M">
		<x> 3.43137 </x>
		<y> 0.000 </y>
		<z> 4.83385 </z>
	</location>
</pointmass>

<pointmass name="Belly Pallet 22">
	<weight unit="LBS"> 0.0000 </weight>
	<location name="POINTMASS" unit="M">
		<x> 6.12482 </x>
		<y> 0.000 </y>
		<z> 4.83385 </z>
	</location>
</pointmass>

<pointmass name="Belly Pallet 23">
	<weight unit="LBS"> 0.0000 </weight>
	<location name="POINTMASS" unit="M">
		<x> 8.77708 </x>
		<y> 0.000 </y>
		<z> 4.83385 </z>
	</location>
</pointmass>

<pointmass name="Belly Pallet 31">
	<weight unit="LBS"> 0.0000 </weight>
	<location name="POINTMASS" unit="M">
		<x> 11.6729 </x>
		<y> 0.000 </y>
		<z> 4.83385 </z>
	</location>
</pointmass>

<pointmass name="Belly Pallet 32">
	<weight unit="LBS"> 0.0000 </weight>
	<location name="POINTMASS" unit="M">
		<x> 14.3663 </x>
		<y> 0.000 </y>
		<z> 4.83385 </z>
	</location>
</pointmass>

 </mass_balance>

 <ground_reactions>
<!--
  <contact type="BOGEY" name="Nose_Gear">
   <location unit="M">
     <x> -16.3416 </x>
     <y>   0.00 </y>
     <z> 0.00 </z>
   </location>
   <static_friction>  0.80 </static_friction>
   <dynamic_friction> 0.90 </dynamic_friction>
   <rolling_friction> 0.02 </rolling_friction>
   <spring_coeff unit="LBS/FT">      284775.75 </spring_coeff>
   <damping_coeff unit="LBS/FT/SEC"> 94925.25 </damping_coeff>
   <max_steer unit="DEG"> 68.00 </max_steer> -->
    <!-- like DC-10 or MD-10 -->
	<!--
   <brake_group>NONE</brake_group>
   <retractable>1</retractable>
 </contact>
 -->
<contact name="Nose Gear" type="BOGEY">
   <location unit="M">
     <x> -16.3416 </x>
     <y>   0.00 </y>
     <z> 0.00 </z>
   </location>
            <static_friction>  0.80 </static_friction>
            <dynamic_friction> 0.50 </dynamic_friction>
            <rolling_friction> 0.02 </rolling_friction>
   <spring_coeff unit="LBS/FT">      284775.75 </spring_coeff>
   <damping_coeff unit="LBS/FT/SEC"> 94925.25 </damping_coeff>
            <damping_coeff_rebound unit="LBS/FT/SEC">188000.00</damping_coeff_rebound>
            <relaxation_velocity>
              <rolling unit="FT/SEC">0.7</rolling>
              <side unit="FT/SEC">0.7</side>
            </relaxation_velocity>
            <force_lag_filter>
              <rolling> 120.0 </rolling>
              <side>120.0 </side>
            </force_lag_filter>
            <wheel_slip_filter> 120.0 </wheel_slip_filter>
            <max_steer unit="DEG"> 68 </max_steer>
            <brake_group> NONE </brake_group>
            <retractable>1</retractable>
        </contact>
  <contact type="BOGEY" name="Left_Gear">
   <location unit="M">
     <x> -3.4434 </x>
     <y> -3.17137 </y>
     <z> 0.00 </z>
   </location>
   <static_friction>  0.80 </static_friction>
   <dynamic_friction> 0.50 </dynamic_friction>
   <rolling_friction> 0.02 </rolling_friction>
   <spring_coeff unit="LBS/FT">      949252.50 </spring_coeff>
   <damping_coeff unit="LBS/FT/SEC"> 189850.50 </damping_coeff>
   <max_steer unit="DEG">0</max_steer>
   <brake_group>LEFT</brake_group>
   <retractable>1</retractable>
 </contact>

  <contact type="BOGEY" name="Right_Gear">
   <location unit="M">
     <x> -3.4434 </x>
     <y> 3.17137 </y>
     <z> 0.00 </z>
   </location>
   <static_friction>  0.80 </static_friction>
   <dynamic_friction> 0.50 </dynamic_friction>
   <rolling_friction> 0.02 </rolling_friction>
   <spring_coeff unit="LBS/FT">      949252.50 </spring_coeff>
   <damping_coeff unit="LBS/FT/SEC"> 189850.50 </damping_coeff>
   <max_steer unit="DEG">0</max_steer>
   <brake_group>RIGHT</brake_group>
   <retractable>1</retractable>
 </contact>

  <contact type="BOGEY" name="Left_Main_Gear">
   <location unit="M">
     <x> 2.1024 </x>
     <y>-0.831016 </y>
     <z> 0.00 </z>
   </location>
   <static_friction>  0.80 </static_friction>
   <dynamic_friction> 0.50 </dynamic_friction>
   <rolling_friction> 0.02 </rolling_friction>
   <spring_coeff unit="LBS/FT">      949252.50 </spring_coeff>
   <damping_coeff unit="LBS/FT/SEC"> 189850.50 </damping_coeff>
   <max_steer unit="DEG">0</max_steer>
   <brake_group>LEFT</brake_group>
   <retractable>1</retractable>
 </contact>

  <contact type="BOGEY" name="Right_Main_Gear">
   <location unit="M">
     <x> 2.1024 </x>
     <y> 0.831016 </y>
     <z> 0.00 </z>
   </location>
   <static_friction>  0.80 </static_friction>
   <dynamic_friction> 0.50 </dynamic_friction>
   <rolling_friction> 0.02 </rolling_friction>
   <spring_coeff unit="LBS/FT">      949252.50 </spring_coeff>
   <damping_coeff unit="LBS/FT/SEC"> 189850.50 </damping_coeff>
   <max_steer unit="DEG">0</max_steer>
   <brake_group>RIGHT</brake_group>
   <retractable>1</retractable>
 </contact>

  <contact type="STRUCTURE" name="LEFT_WING">
    <location unit="M">
     <x> -2.8025 </x>
     <y> -4.18488 </y>
     <z> 4.48476 </z>
    </location>
    <static_friction>  0.80 </static_friction>
    <dynamic_friction> 0.50 </dynamic_friction>
    <spring_coeff unit="LBS/FT">      949252.50 </spring_coeff>
    <damping_coeff unit="LBS/FT/SEC"> 189850.50 </damping_coeff>
 </contact>

  <contact type="STRUCTURE" name="RIGHT_WING">
    <location unit="M">
     <x> -2.8025 </x>
     <y> 4.18488 </y>
     <z> 4.48476 </z>
    </location>
    <static_friction>  0.80 </static_friction>
    <dynamic_friction> 0.50 </dynamic_friction>
    <spring_coeff unit="LBS/FT">      949252.50 </spring_coeff>
    <damping_coeff unit="LBS/FT/SEC"> 189850.50 </damping_coeff>
 </contact>

<contact name="Fuselage_Nose" type="STRUCTURE">
            <location unit="M">
                <x> -31.6724 </x>
                <y>   0.00000 </y>
                <z>   6.09628 </z>
            </location>
            <static_friction>  0.80 </static_friction>
            <dynamic_friction> 0.50 </dynamic_friction>
            <rolling_friction> 0.50 </rolling_friction>
            <spring_coeff unit="LBS/FT"> 120000 </spring_coeff>
            <damping_coeff unit="LBS/FT/SEC"> 10000 </damping_coeff>
            <damping_coeff_rebound unit="LBS/FT/SEC">20000</damping_coeff_rebound>
            <relaxation_velocity>
              <rolling unit="FT/SEC">0.7</rolling>
              <side unit="FT/SEC">0.7</side>
            </relaxation_velocity>
            <force_lag_filter>
              <rolling> 120.0 </rolling>
              <side> 120.0 </side>
            </force_lag_filter>
            <wheel_slip_filter> 120.0 </wheel_slip_filter>
            <max_steer unit="DEG"> 0.0 </max_steer>
            <brake_group> NONE </brake_group>
            <retractable>0</retractable>
        </contact>

<contact name="Fuselage_Tail_B" type="STRUCTURE">
            <location unit="M">
                <x> 6.8732 </x>
                <y> 0 </y>
                <z> 2.62008 </z>
            </location>
            <static_friction>  0.80 </static_friction>
            <dynamic_friction> 0.50 </dynamic_friction>
            <rolling_friction> 0.50 </rolling_friction>
            <spring_coeff unit="LBS/FT"> 120000 </spring_coeff>
            <damping_coeff unit="LBS/FT/SEC"> 10000 </damping_coeff>
            <damping_coeff_rebound unit="LBS/FT/SEC">20000</damping_coeff_rebound>
            <relaxation_velocity>
              <rolling unit="FT/SEC">0.7</rolling>
              <side unit="FT/SEC">0.7</side>
            </relaxation_velocity>
            <force_lag_filter>
              <rolling> 120.0 </rolling>
              <side> 120.0 </side>
            </force_lag_filter>
            <wheel_slip_filter> 120.0 </wheel_slip_filter>
            <max_steer unit="DEG"> 0.0 </max_steer>
            <brake_group> NONE </brake_group>
            <retractable>0</retractable>
        </contact>

<contact name="Fuselage_Tail" type="STRUCTURE">
            <location unit="M">
                <x> 29.4681 </x>
                <y>  0.0000 </y>
                <z> 23.0352 </z>
            </location>
            <static_friction>  0.80 </static_friction>
            <dynamic_friction> 0.50 </dynamic_friction>
            <rolling_friction> 0.50 </rolling_friction>
            <spring_coeff unit="LBS/FT"> 120000 </spring_coeff>
            <damping_coeff unit="LBS/FT/SEC"> 10000 </damping_coeff>
            <damping_coeff_rebound unit="LBS/FT/SEC">20000</damping_coeff_rebound>
            <relaxation_velocity>
              <rolling unit="FT/SEC">0.7</rolling>
              <side unit="FT/SEC">0.7</side>
            </relaxation_velocity>
            <force_lag_filter>
              <rolling> 120.0 </rolling>
              <side> 120.0 </side>
            </force_lag_filter>
            <wheel_slip_filter> 120.0 </wheel_slip_filter>
            <max_steer unit="DEG"> 0.0 </max_steer>
            <brake_group> NONE </brake_group>
            <retractable>0</retractable>
</contact>

<contact name="Fuselage_Tail_End" type="STRUCTURE">
            <location unit="M">
                <x> 28.0487 </x>
                <y>  0.0000 </y>
                <z> 6.06542 </z>
            </location>
            <static_friction>  0.80 </static_friction>
            <dynamic_friction> 0.50 </dynamic_friction>
            <rolling_friction> 0.50 </rolling_friction>
            <spring_coeff unit="LBS/FT"> 120000 </spring_coeff>
            <damping_coeff unit="LBS/FT/SEC"> 10000 </damping_coeff>
            <damping_coeff_rebound unit="LBS/FT/SEC">20000</damping_coeff_rebound>
            <relaxation_velocity>
              <rolling unit="FT/SEC">0.7</rolling>
              <side unit="FT/SEC">0.7</side>
            </relaxation_velocity>
            <force_lag_filter>
              <rolling> 120.0 </rolling>
              <side> 120.0 </side>
            </force_lag_filter>
            <wheel_slip_filter> 120.0 </wheel_slip_filter>
            <max_steer unit="DEG"> 0.0 </max_steer>
            <brake_group> NONE </brake_group>
            <retractable>0</retractable>
</contact>

<contact name="Left Wing Tip" type="STRUCTURE">
            <location unit="M">
                <x>   9.7491 </x>
                <y> -31.2323 </y>
                <z>   6.388 </z>
            </location>
            <static_friction>  0.80 </static_friction>
            <dynamic_friction> 0.50 </dynamic_friction>
            <rolling_friction> 0.50 </rolling_friction>
            <spring_coeff unit="LBS/FT"> 120000 </spring_coeff>
            <damping_coeff unit="LBS/FT/SEC"> 10000 </damping_coeff>
            <damping_coeff_rebound unit="LBS/FT/SEC">20000</damping_coeff_rebound>
            <relaxation_velocity>
              <rolling unit="FT/SEC">0.7</rolling>
              <side unit="FT/SEC">0.7</side>
            </relaxation_velocity>
            <force_lag_filter>
              <rolling> 120.0 </rolling>
              <side> 120.0 </side>
            </force_lag_filter>
            <wheel_slip_filter> 120.0 </wheel_slip_filter>
            <max_steer unit="DEG"> 0.0 </max_steer>
            <brake_group> NONE </brake_group>
            <retractable>0</retractable>
</contact>

<contact name="Right Wing Tip" type="STRUCTURE">
            <location unit="M">
                <x>   9.7491 </x>
                <y>  31.2323 </y>
                <z>   6.388 </z>
            </location>
            <static_friction>  0.80 </static_friction>
            <dynamic_friction> 0.50 </dynamic_friction>
            <rolling_friction> 0.50 </rolling_friction>
            <spring_coeff unit="LBS/FT"> 120000 </spring_coeff>
            <damping_coeff unit="LBS/FT/SEC"> 10000 </damping_coeff>
            <damping_coeff_rebound unit="LBS/FT/SEC">20000</damping_coeff_rebound>
            <relaxation_velocity>
              <rolling unit="FT/SEC">0.7</rolling>
              <side unit="FT/SEC">0.7</side>
            </relaxation_velocity>
            <force_lag_filter>
              <rolling> 120.0 </rolling>
              <side> 120.0 </side>
            </force_lag_filter>
            <wheel_slip_filter> 120.0 </wheel_slip_filter>
            <max_steer unit="DEG"> 0.0 </max_steer>
            <brake_group> NONE </brake_group>
            <retractable>0</retractable>
</contact>

 </ground_reactions>

 <propulsion>

   <engine file="CF6-80C2">
    <location unit="M">
      <x> -1.66235 </x>
      <y> -20.5013 </y>
      <z> 3.63763 </z>
    </location>
    <orient unit="DEG">
      <pitch> 0.00 </pitch>
      <roll>   0.00 </roll>
      <yaw>   0.00 </yaw>
    </orient>
    <feed>0</feed>
    <feed>1</feed>
    <feed>2</feed>
    <feed>3</feed>
    <feed>4</feed>
    <feed>5</feed>
    <feed>6</feed>
    <feed>7</feed>
    <thruster file="direct">
     <location unit="M">
      <x> -1.66235 </x>
      <y> -20.5013 </y>
      <z> 3.63763 </z>
     </location>
     <orient unit="DEG">
       <pitch> 0.00 </pitch>
       <roll>   0.00 </roll>
       <yaw>   0.00 </yaw>
     </orient>
    </thruster>
  </engine>

   <engine file="CF6-80C2">
    <location unit="M">
      <x> -8.8332 </x>
      <y> -11.2115 </y>
      <z> 3.00633 </z>
    </location>
    <orient unit="DEG">
      <pitch> 0.00 </pitch>
      <roll>   0.00 </roll>
      <yaw>   0.00 </yaw>
    </orient>
    <feed>0</feed>
    <feed>1</feed>
    <feed>2</feed>
    <feed>3</feed>
    <feed>4</feed>
    <feed>5</feed>
    <feed>6</feed>
    <feed>7</feed>
    <thruster file="direct">
     <location unit="M">
      <x> -8.8332 </x>
      <y> -11.2115 </y>
      <z> 3.00633 </z>
     </location>
     <orient unit="DEG">
       <pitch> 0.00 </pitch>
       <roll>   0.00 </roll>
       <yaw>   0.00 </yaw>
     </orient>
    </thruster>
  </engine>

   <engine file="CF6-80C2">
    <location unit="M">
      <x> -8.8332 </x>
      <y>  11.2115 </y>
      <z> 3.00633 </z>
    </location>
    <orient unit="DEG">
      <pitch> 0.00 </pitch>
      <roll>   0.00 </roll>
      <yaw>   0.00 </yaw>
    </orient>
    <feed>0</feed>
    <feed>1</feed>
    <feed>2</feed>
    <feed>3</feed>
    <feed>4</feed>
    <feed>5</feed>
    <feed>6</feed>
    <feed>7</feed>
    <thruster file="direct">
     <location unit="M">
      <x> -8.8332 </x>
      <y>  11.2115 </y>
      <z> 3.00633 </z>
     </location>
     <orient unit="DEG">
       <pitch> 0.00 </pitch>
       <roll>   0.00 </roll>
       <yaw>   0.00 </yaw>
     </orient>
    </thruster>
  </engine>

   <engine file="CF6-80C2">
    <location unit="M">
      <x> -1.66235 </x>
      <y>  20.5013 </y>
      <z> 3.63763 </z>
    </location>
    <orient unit="DEG">
      <pitch> 0.00 </pitch>
      <roll>   0.00 </roll>
      <yaw>   0.00 </yaw>
    </orient>
    <feed>0</feed>
    <feed>1</feed>
    <feed>2</feed>
    <feed>3</feed>
    <feed>4</feed>
    <feed>5</feed>
    <feed>6</feed>
    <feed>7</feed>
    <thruster file="direct">
     <location unit="M">
      <x> -1.66235 </x>
      <y>  20.5013 </y>
      <z> 3.63763 </z>
     </location>
     <orient unit="DEG">
       <pitch> 0.00 </pitch>
       <roll>   0.00 </roll>
       <yaw>   0.00 </yaw>
     </orient>
    </thruster>
  </engine>
	<!-- 80150 lbs - usgallon and 1 gallon = 6.84 pounds (lb) , based on Jet-A fuel -->
  <tank type="FUEL" number="0">
     <name>Ext Left Wing</name>
     <location unit="M">
       <x>   5.44531 </x>
       <y> -20.5162 </y>
       <z>   5.74039 </z>
     </location>
     <capacity unit="LBS"> 5000.00 </capacity>
     <contents unit="LBS"> 2532.83 </contents>
  </tank>

  <tank type="FUEL" number="1">
     <name>Int Left Wing</name>
     <location unit="M">
       <x> -1.00839 </x>
       <y> -9.28327 </y>
       <z>  4.86278 </z>
     </location>
     <capacity unit="LBS"> 12500.00 </capacity>
     <contents unit="LBS"> 5932.83 </contents>
  </tank>

  <tank type="FUEL" number="2">
     <name>Center</name>
     <location unit="M">
       <x> -1.00839 </x>
       <y>   0.00 </y>
       <z> 3.72343 </z>
     </location>
     <capacity unit="LBS"> 42650.00 </capacity>
     <contents unit="LBS"> 25012.83 </contents>
  </tank>

  <tank type="FUEL" number="3">
     <name>Int Right Wing</name>
     <location unit="M">
       <x> -1.00839 </x>
       <y>  9.28327 </y>
       <z>  4.86278 </z>
     </location>
     <capacity unit="LBS"> 12500.00 </capacity>
     <contents unit="LBS"> 5932.83 </contents>
  </tank>

  <tank type="FUEL" number="4">
     <name>Ext Right Wing</name>
     <location unit="M">
       <x>   5.44531 </x>
       <y>  20.5162 </y>
       <z>   5.74039 </z>
     </location>
     <capacity unit="LBS"> 5000.00 </capacity>
     <contents unit="LBS"> 2532.83 </contents>
  </tank>

  <tank type="FUEL" number="5">
     <name>VStab Left</name>
     <location unit="M">
       <x>   5.44531 </x>
       <y>  20.5162 </y>
       <z>   5.74039 </z>
     </location>
     <capacity unit="LBS">  500.00 </capacity>
     <contents unit="LBS">  232.83 </contents>
  </tank>

  <tank type="FUEL" number="6">
     <name>Tail</name>
     <location unit="M">
       <x>   5.44531 </x>
       <y>  20.5162 </y>
       <z>   5.74039 </z>
     </location>
     <capacity unit="LBS"> 1500.00 </capacity>
     <contents unit="LBS">  532.83 </contents>
  </tank>

  <tank type="FUEL" number="7">
     <name>VStab Right</name>
     <location unit="M">
       <x>   5.44531 </x>
       <y>  20.5162 </y>
       <z>   5.74039 </z>
     </location>
     <capacity unit="LBS">  500.00 </capacity>
     <contents unit="LBS">  232.83 </contents>
  </tank>

 </propulsion>

 <system file="pushback"/>
 <system file="NWS"/>
 <system file="crash-detect"/>
 <system file="particles"/>


 <flight_control name="FCS: MD-12">

  <channel name="Pitch">
   <summer name="Pitch Trim Sum">
      <input>fcs/elevator-cmd-norm</input>
      <input>fcs/pitch-trim-cmd-norm</input>
      <clipto>
        <min> -1 </min>
        <max>  1 </max>
      </clipto>
   </summer>

   <aerosurface_scale name="Elevator Control">
      <input>fcs/pitch-trim-sum</input>
      <range>
        <min> -0.35 </min>
        <max>  0.35 </max>
      </range>
      <output>fcs/elevator-pos-rad</output>
   </aerosurface_scale>

   <aerosurface_scale name="elevator normalization">
      <input>fcs/elevator-pos-rad</input>
      <domain>
        <min> -0.35 </min>
        <max>  0.35 </max>
      </domain>
      <range>
        <min> -1 </min>
        <max>  1 </max>
      </range>
      <output>fcs/elevator-pos-norm</output>
   </aerosurface_scale>

  </channel>

  <channel name="Roll">
   <summer name="Roll Trim Sum">
      <input>fcs/aileron-cmd-norm</input>
      <input>fcs/roll-trim-cmd-norm</input>
      <clipto>
        <min> -1 </min>
        <max>  1 </max>
      </clipto>
   </summer>

   <aerosurface_scale name="Left Aileron Control">
      <input>fcs/roll-trim-sum</input>
      <range>
        <min> -0.35 </min>
        <max>  0.35 </max>
      </range>
      <output>fcs/left-aileron-pos-rad</output>
   </aerosurface_scale>

   <aerosurface_scale name="Right Aileron Control">
      <input>fcs/roll-trim-sum</input>
      <range>
        <min> -0.35 </min>
        <max>  0.35 </max>
      </range>
      <output>fcs/right-aileron-pos-rad</output>
   </aerosurface_scale>

   <aerosurface_scale name="left aileron normalization">
      <input>fcs/left-aileron-pos-rad</input>
      <domain>
        <min> -0.35 </min>
        <max>  0.35 </max>
      </domain>
      <range>
        <min> -1 </min>
        <max>  1 </max>
      </range>
      <output>fcs/left-aileron-pos-norm</output>
   </aerosurface_scale>

   <aerosurface_scale name="right aileron normalization">
      <input>fcs/right-aileron-pos-rad</input>
      <domain>
        <min> -0.35 </min>
        <max>  0.35 </max>
      </domain>
      <range>
        <min> -1 </min>
        <max>  1 </max>
      </range>
      <output>fcs/right-aileron-pos-norm</output>
   </aerosurface_scale>

  </channel>

  <channel name="Yaw">
   <summer name="Rudder Command Sum">
      <input>fcs/rudder-cmd-norm</input>
      <input>fcs/yaw-trim-cmd-norm</input>
      <clipto>
        <min> -0.35 </min>
        <max>  0.35 </max>
      </clipto>
   </summer>

   <scheduled_gain name="Yaw Damper Rate">
      <input>velocities/r-aero-rad_sec</input>
      <table>
        <independentVar lookup="row">velocities/ve-kts</independentVar>
         <tableData>
            30     0.00
            60     2.00
         </tableData>
      </table>
   </scheduled_gain>

   <scheduled_gain name="Yaw Damper Beta">
      <input>aero/beta-rad</input>
      <table>
        <independentVar lookup="row">velocities/ve-kts</independentVar>
        <tableData>
           30     0.00
           60     0.00
        </tableData>
      </table>
   </scheduled_gain>

   <summer name="Yaw Damper Sum">
      <input>fcs/yaw-damper-beta</input>
      <input>fcs/yaw-damper-rate</input>
      <clipto>
        <min> -0.1 </min>
        <max>  0.1 </max>
      </clipto>
   </summer>

   <scheduled_gain name="Yaw Damper Final">
      <input>fcs/yaw-damper-sum</input>
      <table>
        <independentVar lookup="row">velocities/ve-kts</independentVar>
        <tableData>
           30         0.0
           31         1.0
        </tableData>
      </table>
   </scheduled_gain>

   <summer name="Rudder Sum">
      <input>fcs/rudder-command-sum</input>
      <input>fcs/yaw-damper-final</input>
      <clipto>
        <min> -1 </min>
        <max>  1 </max>
      </clipto>
   </summer>

   <aerosurface_scale name="Rudder Control">
      <input>fcs/rudder-sum</input>
      <range>
        <min> -0.35 </min>
        <max>  0.35 </max>
      </range>
      <output>fcs/rudder-pos-rad</output>
   </aerosurface_scale>

   <aerosurface_scale name="rudder normalization">
      <input>fcs/rudder-pos-rad</input>
      <domain>
        <min> -0.35 </min>
        <max>  0.35 </max>
      </domain>
      <range>
        <min> -1 </min>
        <max>  1 </max>
      </range>
      <output>fcs/rudder-pos-norm</output>
   </aerosurface_scale>

  </channel>

  <channel name="Flaps">
   <kinematic name="Flaps Control">
     <input>fcs/flap-cmd-norm</input>
     <traverse>
       <setting>
          <position>  0 </position>
          <time>      0 </time>
       </setting>
       <setting>
          <position> 15 </position>
          <time>      4 </time>
       </setting>
       <setting>
          <position> 30 </position>
          <time>      3 </time>
       </setting>
     </traverse>
     <output>fcs/flap-pos-deg</output>
   </kinematic>

   <aerosurface_scale name="flap normalization">
      <input>fcs/flap-pos-deg</input>
      <domain>
        <min>  0 </min>
        <max> 30 </max>
      </domain>
      <range>
        <min> 0 </min>
        <max> 1 </max>
      </range>
      <output>fcs/flap-pos-norm</output>
   </aerosurface_scale>

  </channel>

  <channel name="Landing Gear">
   <kinematic name="Gear Control">
     <input>gear/gear-cmd-norm</input>
     <traverse>
       <setting>
          <position> 0 </position>
          <time>     0 </time>
       </setting>
       <setting>
          <position> 1 </position>
          <time>     5 </time>
       </setting>
     </traverse>
     <output>gear/gear-pos-norm</output>
   </kinematic>

  </channel>

  <channel name="Speedbrake">
   <kinematic name="Speedbrake Control">
     <input>fcs/speedbrake-cmd-norm</input>
     <traverse>
       <setting>
          <position> 0 </position>
          <time>     0 </time>
       </setting>
       <setting>
          <position> 1 </position>
          <time>     1 </time>
       </setting>
     </traverse>
     <output>fcs/speedbrake-pos-norm</output>
   </kinematic>

  </channel>

 </flight_control>

 <aerodynamics>

  <axis name="LIFT">

    <function name="aero/coefficient/CLalpha">
      <description>Lift_due_to_alpha</description>
      <product>
          <property>aero/qbar-psf</property>
          <property>metrics/Sw-sqft</property>
          <table>
            <independentVar lookup="row">aero/alpha-rad</independentVar>
            <tableData>
              -0.20 -0.680
               0.00 0.200
             0.23    1.200
               0.60 0.600
            </tableData>
          </table>
      </product>
    </function>

    <function name="aero/coefficient/dCLflap">
       <description>Delta_Lift_due_to_flaps</description>
       <product>
           <property>aero/qbar-psf</property>
           <property>metrics/Sw-sqft</property>
           <property>fcs/flap-pos-deg</property>
           <value> 0.05000 </value>
       </product>
    </function>

    <function name="aero/coefficient/dCLsb">
       <description>Delta_Lift_due_to_speedbrake</description>
       <product>
           <property>aero/qbar-psf</property>
           <property>metrics/Sw-sqft</property>
           <property>fcs/speedbrake-pos-norm</property>
           <value>-0.08</value>
       </product>
    </function>

    <function name="aero/coefficient/CLde">
       <description>Lift_due_to_Elevator_Deflection</description>
       <product>
           <property>aero/qbar-psf</property>
           <property>metrics/Sw-sqft</property>
           <property>fcs/elevator-pos-rad</property>
           <value>0.2</value>
       </product>
    </function>

  </axis>

  <axis name="DRAG">

    <function name="aero/coefficient/CD0">
       <description>Drag_at_zero_lift</description>
       <product>
          <property>aero/qbar-psf</property>
          <property>metrics/Sw-sqft</property>
          <table>
            <independentVar lookup="row">aero/alpha-rad</independentVar>
            <tableData>
             -1.57       1.500
             -0.26    0.022
              0.00    0.017
              0.26    0.022
              1.57       1.500
            </tableData>
          </table>
       </product>
    </function>

    <function name="aero/coefficient/CDi">
       <description>Induced_drag</description>
         <product>
           <property>aero/qbar-psf</property>
           <property>metrics/Sw-sqft</property>
           <property>aero/cl-squared</property>
           <value>0.042</value>
         </product>
    </function>

    <function name="aero/coefficient/CDmach">
       <description>Drag_due_to_mach</description>
        <product>
          <property>aero/qbar-psf</property>
          <property>metrics/Sw-sqft</property>
          <table>
            <independentVar lookup="row">velocities/mach</independentVar>
            <tableData>
                0.00      0.000
                0.79      0.000
                1.10      0.023
                1.80      0.015
            </tableData>
          </table>
        </product>
    </function>

    <function name="aero/coefficient/CDflap">
       <description>Drag_due_to_flaps</description>
         <product>
           <property>aero/qbar-psf</property>
           <property>metrics/Sw-sqft</property>
           <property>fcs/flap-pos-deg</property>
           <value> 0.00183 </value>
         </product>
    </function>

    <function name="aero/coefficient/CDgear">
       <description>Drag_due_to_gear</description>
         <product>
           <property>aero/qbar-psf</property>
           <property>metrics/Sw-sqft</property>
           <property>gear/gear-pos-norm</property>
           <value>0.011</value>
         </product>
    </function>

    <function name="aero/coefficient/CDsb">
       <description>Drag_due_to_speedbrakes</description>
         <product>
           <property>aero/qbar-psf</property>
           <property>metrics/Sw-sqft</property>
           <property>fcs/speedbrake-pos-norm</property>
           <value>0.017</value>
         </product>
    </function>

    <function name="aero/coefficient/CDbeta">
       <description>Drag_due_to_sideslip</description>
       <product>
          <property>aero/qbar-psf</property>
          <property>metrics/Sw-sqft</property>
          <table>
            <independentVar lookup="row">aero/beta-rad</independentVar>
            <tableData>
              -1.57       1.230
              -0.26    0.050
               0.00       0.000
               0.26    0.050
               1.57       1.230
            </tableData>
          </table>
       </product>
    </function>

    <function name="aero/coefficient/CDde">
       <description>Drag_due_to_Elevator_Deflection</description>
       <product>
           <property>aero/qbar-psf</property>
           <property>metrics/Sw-sqft</property>
           <abs><property>fcs/elevator-pos-norm</property></abs>
           <value>0.04</value>
       </product>
    </function>

  </axis>

  <axis name="SIDE">

    <function name="aero/coefficient/CYb">
       <description>Side_force_due_to_beta</description>
       <product>
           <property>aero/qbar-psf</property>
           <property>metrics/Sw-sqft</property>
           <property>aero/beta-rad</property>
           <value>-1</value>
       </product>
    </function>

  </axis>

  <axis name="ROLL">

    <function name="aero/coefficient/Clb">
       <description>Roll_moment_due_to_beta</description>
       <product>
           <property>aero/qbar-psf</property>
           <property>metrics/Sw-sqft</property>
           <property>metrics/bw-ft</property>
           <property>aero/beta-rad</property>
           <value>-0.1</value>
       </product>
    </function>

    <function name="aero/coefficient/Clp">
       <description>Roll_moment_due_to_roll_rate</description>
       <product>
           <property>aero/qbar-psf</property>
           <property>metrics/Sw-sqft</property>
           <property>metrics/bw-ft</property>
           <property>aero/bi2vel</property>
           <property>velocities/p-aero-rad_sec</property>
           <value>-0.4</value>
       </product>
    </function>

    <function name="aero/coefficient/Clr">
       <description>Roll_moment_due_to_yaw_rate</description>
       <product>
           <property>aero/qbar-psf</property>
           <property>metrics/Sw-sqft</property>
           <property>metrics/bw-ft</property>
           <property>aero/bi2vel</property>
           <property>velocities/r-aero-rad_sec</property>
           <value>0.15</value>
       </product>
    </function>

    <function name="aero/coefficient/Clda">
       <description>Roll_moment_due_to_aileron</description>
       <product>
          <property>aero/qbar-psf</property>
          <property>metrics/Sw-sqft</property>
          <property>metrics/bw-ft</property>
          <property>fcs/left-aileron-pos-rad</property>
          <table>
            <independentVar lookup="row">velocities/mach</independentVar>
            <tableData>
              0.0    0.100
              2.0    0.033
            </tableData>
          </table>
       </product>
    </function>

    <function name="aero/coefficient/Cldr">
       <description>Roll_moment_due_to_rudder</description>
       <product>
           <property>aero/qbar-psf</property>
           <property>metrics/Sw-sqft</property>
           <property>metrics/bw-ft</property>
           <property>fcs/rudder-pos-rad</property>
           <value>0.01</value>
       </product>
    </function>

  </axis>

  <axis name="PITCH">

    <function name="aero/coefficient/Cmalpha">
       <description>Pitch_moment_due_to_alpha</description>
       <product>
           <property>aero/qbar-psf</property>
           <property>metrics/Sw-sqft</property>
           <property>metrics/cbarw-ft</property>
           <property>aero/alpha-rad</property>
           <value>-0.7</value>
       </product>
    </function>

    <function name="aero/coefficient/Cmde">
       <description>Pitch_moment_due_to_elevator</description>
       <product>
          <property>aero/qbar-psf</property>
          <property>metrics/Sw-sqft</property>
          <property>metrics/cbarw-ft</property>
          <property>fcs/elevator-pos-rad</property>
          <table>
            <independentVar lookup="row">velocities/mach</independentVar>
            <tableData>
              0.0     -1.300
              2.0     -0.325
            </tableData>
          </table>
       </product>
    </function>

    <function name="aero/coefficient/Cmq">
       <description>Pitch_moment_due_to_pitch_rate</description>
       <product>
           <property>aero/qbar-psf</property>
           <property>metrics/Sw-sqft</property>
           <property>metrics/cbarw-ft</property>
           <property>aero/ci2vel</property>
           <property>velocities/q-aero-rad_sec</property>
           <value>-21</value>
       </product>
    </function>

    <function name="aero/coefficient/Cmadot">
       <description>Pitch_moment_due_to_alpha_rate</description>
       <product>
           <property>aero/qbar-psf</property>
           <property>metrics/Sw-sqft</property>
           <property>metrics/cbarw-ft</property>
           <property>aero/ci2vel</property>
           <property>aero/alphadot-rad_sec</property>
           <value>-4</value>
       </product>
    </function>

  </axis>

  <axis name="YAW">

    <function name="aero/coefficient/Cnb">
       <description>Yaw_moment_due_to_beta</description>
       <product>
           <property>aero/qbar-psf</property>
           <property>metrics/Sw-sqft</property>
           <property>metrics/bw-ft</property>
           <property>aero/beta-rad</property>
           <value>0.12</value>
       </product>
    </function>

    <function name="aero/coefficient/Cnr">
       <description>Yaw_moment_due_to_yaw_rate</description>
       <product>
           <property>aero/qbar-psf</property>
           <property>metrics/Sw-sqft</property>
           <property>metrics/bw-ft</property>
           <property>aero/bi2vel</property>
           <property>velocities/r-aero-rad_sec</property>
           <value>-0.15</value>
       </product>
    </function>

    <function name="aero/coefficient/Cndr">
       <description>Yaw_moment_due_to_rudder</description>
       <product>
           <property>aero/qbar-psf</property>
           <property>metrics/Sw-sqft</property>
           <property>metrics/bw-ft</property>
           <property>fcs/rudder-pos-rad</property>
           <value>-0.1</value>
       </product>
    </function>

    <function name="aero/coefficient/Cnda">
       <description>Adverse_yaw</description>
       <product>
           <property>aero/qbar-psf</property>
           <property>metrics/Sw-sqft</property>
           <property>metrics/bw-ft</property>
           <property>fcs/left-aileron-pos-rad</property>
           <value>0</value>
       </product>
    </function>

  </axis>

 </aerodynamics>

<external_reactions>

 <force name="pushback" frame="BODY">
  <location unit="IN">
     <x> -16.3416 </x>
     <y>   0.00 </y>
     <z> 0.00 </z>
  </location>
  <direction>
   <x>1</x>
   <y>0</y>
   <z>0</z>
  </direction>
 </force>

</external_reactions>

</fdm_config>
